// COMSOL Multiphysics 6.4.0.378 model "Busper.mph"
// Parameterized Busbar Geometry
// This is a template MPH-file containing the physics interfaces and the parameterized geometry for the example Electrical Heating in a Busbar.
// Outline of the model tree

Parameters
  L = 9[cm]  // Length
  rad_1 = 6[mm]  // Bolt radius
  tbb = 5[mm]  // Thickness
  wbb = 5[cm]  // Width
  mh = 3[mm]  // Maximum element size
  htc = 5[W/m^2/K]  // Heat transfer coefficient
  Vtot = 20[mV]  // Applied voltage

Selections
  sel1: Explicit "Bolt" on domains 2-7

Geometry
  geom1 "Geometry 1" (3D, length unit m)
    wp1: WorkPlane | quickplane = xz; unite = on
      r1: Rectangle | size = {L+2*tbb, 0.1[m]}
      r2: Rectangle | size = {L+tbb, 0.1[m]-tbb}; pos = {0, tbb}
      dif1: Difference | input = r1; input2 = r2
      fil1: Fillet | point = dif1(1) points 3; radius = tbb
      fil2: Fillet | point = fil1(1) points 6; radius = 2*tbb
    ext1: Extrude | workplane = wp1; input = wp1; distance = wbb
    wp2: WorkPlane | planetype = faceparallel; face = ext1(1) boundaries 8; unite = on
      c1: Circle | r = rad_1
    ext2: Extrude | workplane = wp2; input = wp2; distance = -2*tbb
    wp3: WorkPlane | planetype = faceparallel; face = ext1(1) boundaries 4; unite = on
      c1: Circle | r = rad_1; pos = {-L/2+1.5[cm], -wbb/4}
      copy1: Copy | input = c1; keep = on; displx = 0; disply = wbb/2; indexattrtag = copy1.index
    ext3: Extrude | workplane = wp3; input = wp3; distance = -2*tbb
    fin: Finalize "Form Union"

Materials
  mat1: Common "Copper" on all domains
    def: def "Basic"
      relpermeability = 1
      electricconductivity = 5.998e7[S/m]
      thermalexpansioncoefficient = 17e-6[1/K]
      heatcapacity = 385[J/(kg*K)]
      relpermittivity = 1
      density = 8960[kg/m^3]
      thermalconductivity = 400[W/(m*K)]
    Enu: Enu "Young's modulus and Poisson's ratio"
      E = 110[GPa]
      nu = 0.35
    linzRes: linzRes "Linearized resistivity"
      rho0 = 1.72e-8[ohm*m]
      alpha = 0.0039[1/K]
      Tref = 298[K]
  Bolt: Common "Titanium beta-21S" on selection sel1
    def: def "Basic"
      relpermeability = 1
      electricconductivity = 7.407e5[S/m]
      thermalexpansioncoefficient = 7.06e-6[1/K]
      heatcapacity = 710[J/(kg*K)]
      relpermittivity = 1
      density = 4940[kg/m^3]
      thermalconductivity = 7.5[W/(m*K)]
    Enu: Enu "Young's modulus and Poisson's ratio"
      E = 105[GPa]
      nu = 0.33

Physics
  ec: ConductiveMedia "Electric Currents" on all domains
    dependent variable V
    cucns1: CurrentConservationSolid "Current Conservation in Solids 1" (default) | epsilonr_mat = from_mat
    ein1: ElectricInsulation (default)
    init1: init "Initial Values 1" (default)
    pot1: ElectricPotential on boundaries 43 | V0 = Vtot
    gnd1: Ground on boundaries 8, 15
  ht: HeatTransfer "Heat Transfer in Solids" on all domains
    dependent variable T
    solid1: SolidHeatTransferModel "Solid 1" (default)
    init1: init "Initial Values 1" (default)
    ins1: ThermalInsulation (default)
    hf1: HeatFluxBoundary "Heat Flux 1" on boundaries 1-7, 9-14, 16-42 | HeatFluxType = ConvectiveHeatFlux; h = htc

Multiphysics
  emh1: ElectromagneticHeating on all domains | EMHeat_physics = ec; Heat_physics = ht

Mesh
  mesh1 "Mesh 1" (physics-controlled)
    size: MeshSizeDefault | hauto = 4

Studies
  std1 "Study 1"
    stat: Stationary

Solver configurations
  sol1 "Solution 1" (study std1)
    v1: Variables "Dependent Variables 1"
    s1: Stationary "Stationary Solver 1"
      se1: Segregated
        ss1: SegregatedStep "Electric Currents"
        ss2: SegregatedStep "Temperature"
        ll1: LowerLimit
      i1: Iterative
        mg1: Multigrid
      d1: Direct "Direct, heat transfer variables (ht)"

Datasets
  dset1: Solution | solution = sol1

Plots
  pg1: PlotGroup3D "Electric Potential (ec)" | data = dset1
    vol1: Volume | expr = V
  pg2: PlotGroup3D "Electric Field (ec)" | data = dset1
    mslc1: Multislice
      expr = ec.normE
      multiplanexmethod = coord
      xcoord = ec.CPx
      multiplaneymethod = coord
      ycoord = ec.CPy
      multiplanezmethod = coord
      zcoord = ec.CPz
    strmsl1: StreamlineMultislice
      expr = {ec.Ex, ec.Ey, ec.Ez}
      multiplanexmethod = coord
      xcoord = ec.CPx
      multiplaneymethod = coord
      ycoord = ec.CPy
      multiplanezmethod = coord
      zcoord = ec.CPz
      tran1: Transparency | transparency = 0.9; expr = V
      filt1: Filter | expr = !isScalingSystemDomain
  pg3: PlotGroup3D "Temperature (ht)" | data = dset1
    vol1: Volume | expr = T